// SBML level 2 version 4

model PKA_cycle_MOR()
  // PKA cycle and MOR

  // Compartments:
  compartment default = 1 volume;
  compartment cyt in default = 1 volume;
  compartment nuc in default = 1 volume;

  // Species:
  species AC in cyt = 1;
  species cAMP in cyt = 0;
  species Csub in cyt = 0;
  species RII_C_2 in cyt = 0; RII_C_2 is "RII_2:C_2";
  species RIIp_C_2 in cyt = 1; RIIp_C_2 is "pRII_2:C_2";
  species RIIp_cAMP_C_2 in cyt = 0; RIIp_cAMP_C_2 is "pRII_2:C_2:cAMP_4";
  species RIIp_cAMP_2 in cyt = 0; RIIp_cAMP_2 is "pRII_2:cAMP_4";
  species Sp8_Br_cAMPS in cyt = 0; Sp8_Br_cAMPS is "Sp8-Br-cAMPS";
  species Rp8_Br_cAMPS in cyt = 0; Rp8_Br_cAMPS is "Rp-8-Br-cAMPS";
  species Rp8_pCPT_cAMPS in cyt = 0; Rp8_pCPT_cAMPS is "Rp-8-pCPT-cAMPS";
  species Rp_cAMPS in cyt = 0; Rp_cAMPS is "Rp-cAMPS";
  species RIIp_Rp8_Br_cAMPS_C_2 in cyt = 0; RIIp_Rp8_Br_cAMPS_C_2 is "pRII_2:C_2:Rp-8-Br-cAMPS_4";
  species RIIp_Rp8_pCPT_cAMPS_C_2 in cyt = 0; RIIp_Rp8_pCPT_cAMPS_C_2 is "pRII_2:C_2:Rp-8-pCPT-cAMPS_4";
  species RIIp_Rp_cAMPS_C_2 in cyt = 0; RIIp_Rp_cAMPS_C_2 is "pRII_2:C_2:Rp-cAMPS_4";
  species RIIp_Sp8_Br_cAMPS_C_2 in cyt = 0; RIIp_Sp8_Br_cAMPS_C_2 is "pRII_2:C_2:Sp-8-Br-cAMPS_4";
  species RIIp_Sp8_Br_cAMPS_2 in cyt = 0; RIIp_Sp8_Br_cAMPS_2 is "pRII_2:Sp-8-Br-cAMPS_4";
  species RIIp_2 in cyt = 0; RIIp_2 is "pRII_2";
  species IBMX in cyt = 0;
  species fiveHT4 in cyt = 1;
  species fiveHT4_5HT in cyt = 0;
  species MOR in cyt = 1;
  species MOR_DAMGO in cyt = 0;
  species MOR_Fentanyl in cyt = 0;
  species alphaS_betaS_gammaS in cyt = 1;
  species alphaI_betaI_gammaI in cyt = 1;
  species alphaS_GTP in cyt = 0;
  species alphaI_GTP in cyt = 0;
  species AC_alphaS_GTP in cyt = 0;
  species AC_alphaI_GTP in cyt = 0;

  // Parameters:
  CTOP = 0;
  DMSO = 0;
  AC_total = 1;
  RII2_total = 1;
  fiveHT4_total = 1;
  MOR_total = 1;
  alphaS_betaS_gammaS_total = 1;
  alphaI_betaI_gammaI_total = 1;
  kf_Fsk = 0;
  kf_H89 = 0;
  kf_RII_2__RII_C_2 = 0;
  kf_RII_C_2__RII_2 = 0;
  kf_RII_C_2__RIIp_C_2 = 0;
  kf_RIIp_2__RII_2 = 0;
  kf_RIIp_C_2__RII_C_2 = 0;
  kf_RIIp_cAMP_C_2__RIIp_2 = 0;
  kf_cAMP = 0;
  KD_Fsk = 0;
  KD_H89 = 0;
  KD_IBMX = 0;
  KD_cAMP = 0;
  ki_IBMX = 0;
  ki_Rp8_Br_cAMPS_pAB = 0;
  ki_Rp8_pCPT_cAMPS_pAB = 0;
  ki_Rp_cAMPS_pAB = 0;
  ki_Sp8_Br_cAMPS_AM = 0;
  kdeg_cAMP = 1.00033e-5;
  kdeg_cAMP_free = 0;
  xi_AC_cAMP_Fsk = 0;
  xi_KD_Rp8_Br_cAMPS = 0;
  xi_KD_Rp8_pCPT_cAMPS = 0;
  xi_KD_Rp_cAMPS = 0;
  xi_KD_Sp8_Br_cAMPS = 0;
  xi_b_Rp8_Br_cAMPS = 0;
  xi_b_Rp8_pCPT_cAMPS = 0;
  xi_b_Rp_cAMPS = 0;
  xi_b_Sp8_Br_cAMPS = 0;
  xi_kf_RII_2__RII_C_2 = 0;
  xi_kf_RII_C_2__RII_2 = 0;
  Fsk_level = 0 substance;
  Fsk_time = 0 time;
  H89_level = 0 substance;
  IBMX_level = 0 substance;
  Rp8_Br_cAMPS_pAB_level = 0 substance;
  Rp8_Br_cAMPS_pAB_time = 0 time;
  H89_time = 0 time;
  IBMX_time = 0 time;
  Rp8_pCPT_cAMPS_pAB_level = 0 substance;
  Rp8_pCPT_cAMPS_pAB_time = 0 time;
  Rp_cAMPS_pAB_level = 0 substance;
  Rp_cAMPS_pAB_time = 0 time;
  Sp8_Br_cAMPS_AM_level = 0 substance;
  Sp8_Br_cAMPS_AM_time = 0 time;
  fourABnOH_level = 0 substance;
  fourABnOH_time = 0 time;
  fiveHT_time = 0;
  fiveHT_level = 0;
  DAMGO_time = 0;
  DAMGO_level = 0;
  Fentanyl_time = 0;
  Fentanyl_level = 0;
  ks_AC_cAMP = 0;
  rel_open = 0;
  xi_rel_open = 0;
  Calpha = 0;
  kf_DAMGO = 0;
  KD_DAMGO = 0;
  kf_Fentanyl = 0;
  KD_Fentanyl = 0;
  kf_5HT = 0;
  KD_5HT = 0;
  kdeg_DAMGO = 0;
  kdeg_Fentanyl = 0;
  kdeg_5HT = 0;
  kf_alphaS_GTP__alphaS_GDP = 0;
  kf_alphaI_GTP__alphaI_GDP = 0;
  kf_alphaI_GDP__betaI_gammaI____alphaI_betaI_gammaI = 0;
  kf_alphaS_GDP__betaS_gammaS____alphaS_betaS_gammaS = 0;
  kf_alphaS_betaS_gammaS = 0;
  xi_alphaS_betaS_gammaS__fiveHT4_5HT = 0;
  kf_alphaI_betaI_gammaI = 0;
  xi_alphaI_betaI_gammaI__MOR_DAMGO = 0;
  xi_alphaI_betaI_gammaI__MOR_Fentanyl = 0;
  xi_alphaI_betaI_gammaI__RIIp_cAMP = 0;
  kf_AC_alphaI_GTP = 0;
  KD_AC_alphaI_GTP = 0;
  kf_AC_alphaS_GTP = 0;
  KD_AC_alphaS_GTP = 0;
  xi_AC_cAMP_alphaS_GTP = 0;

  // Assignment rules:
  Fsk := Fsk_level*piecewise(0, time - Fsk_time < 0, 1);
  H89 := H89_level*piecewise(0, time - H89_time < 0, 1);
  IBMXex := IBMX_level*piecewise(0, time - IBMX_time < 0, 1);
  Rp8_Br_cAMPS_pAB := Rp8_Br_cAMPS_pAB_level*piecewise(0, time - Rp8_Br_cAMPS_pAB_time < 0, 1);
  Rp8_pCPT_cAMPS_pAB := Rp8_pCPT_cAMPS_pAB_level*piecewise(0, time - Rp8_pCPT_cAMPS_pAB_time < 0, 1);
  Rp_cAMPS_pAB := Rp_cAMPS_pAB_level*piecewise(0, time - Rp_cAMPS_pAB_time < 0, 1);
  Sp8_Br_cAMPS_AM := Sp8_Br_cAMPS_AM_level*piecewise(0, time - Sp8_Br_cAMPS_AM_time < 0, 1);
  fourABnOH := fourABnOH_level*piecewise(0, time - fourABnOH_time < 0, 1);
  fiveHT := piecewise(0, time < fiveHT_time, fiveHT_level);
  DAMGO := piecewise(0, time < DAMGO_time, DAMGO_level);
  Fentanyl := Fentanyl_level*piecewise(0, time - Fentanyl_time < 0, 1);
  NO_DAMGO_Fentanyl := piecewise(0, Fentanyl_level + DAMGO_level > 0, 1);
  NO_fiveHT := piecewise(0, fiveHT_level > 0, 1);

  // Reactions:
  v1_v_0: => Sp8_Br_cAMPS; cyt*(-ki_Sp8_Br_cAMPS_AM)*(Sp8_Br_cAMPS - Sp8_Br_cAMPS_AM);
  v2_v_1: => Rp8_Br_cAMPS; cyt*(-ki_Rp8_Br_cAMPS_pAB)*(Rp8_Br_cAMPS - Rp8_Br_cAMPS_pAB);
  v3_v_2: => Rp8_pCPT_cAMPS; cyt*(-ki_Rp8_pCPT_cAMPS_pAB)*(Rp8_pCPT_cAMPS - Rp8_pCPT_cAMPS_pAB);
  v4_v_3: => Rp_cAMPS; cyt*(-ki_Rp_cAMPS_pAB)*(Rp_cAMPS - Rp_cAMPS_pAB);
  v5_v_4: => IBMX; cyt*(-ki_IBMX)*(IBMX - IBMXex);
  v6_v_5: AC => ; cyt*AC*Fsk*kf_Fsk;
  v7_v_6: => AC; cyt*(1 - (AC + AC_alphaI_GTP + AC_alphaS_GTP))*KD_Fsk*kf_Fsk;  // modifiers: AC_alphaI_GTP, AC_alphaS_GTP
  v40_v_39: Csub => ; cyt*Csub*H89*kf_H89;
  v41_v_40: => Csub; cyt*(1 - (Csub + RII_C_2 + RIIp_C_2 + RIIp_cAMP_C_2 + RIIp_Rp8_Br_cAMPS_C_2 + RIIp_Rp8_pCPT_cAMPS_C_2 + RIIp_Rp_cAMPS_C_2 + RIIp_Sp8_Br_cAMPS_C_2))*KD_H89*kf_H89;  // modifiers: RII_C_2, RIIp_C_2, RIIp_cAMP_C_2, RIIp_Rp8_Br_cAMPS_C_2, RIIp_Rp8_pCPT_cAMPS_C_2, RIIp_Rp_cAMPS_C_2, RIIp_Sp8_Br_cAMPS_C_2
  v30_v_29: RIIp_C_2 => RIIp_Rp8_Br_cAMPS_C_2; cyt*RIIp_C_2*Rp8_Br_cAMPS*kf_cAMP*xi_b_Rp8_Br_cAMPS;  // modifiers: Rp8_Br_cAMPS
  v31_v_30: RIIp_Rp8_Br_cAMPS_C_2 => RIIp_C_2; cyt*KD_cAMP*RIIp_Rp8_Br_cAMPS_C_2*kf_cAMP*xi_b_Rp8_Br_cAMPS*xi_KD_Rp8_Br_cAMPS;
  v32_v_31: RIIp_C_2 => RIIp_Rp8_pCPT_cAMPS_C_2; cyt*RIIp_C_2*Rp8_pCPT_cAMPS*kf_cAMP*xi_b_Rp8_pCPT_cAMPS;  // modifiers: Rp8_pCPT_cAMPS
  v33_v_32: RIIp_Rp8_pCPT_cAMPS_C_2 => RIIp_C_2; cyt*KD_cAMP*RIIp_Rp8_pCPT_cAMPS_C_2*kf_cAMP*xi_b_Rp8_pCPT_cAMPS*xi_KD_Rp8_pCPT_cAMPS;
  v34_v_33: RIIp_C_2 => RIIp_Rp_cAMPS_C_2; cyt*RIIp_C_2*Rp_cAMPS*kf_cAMP*xi_b_Rp_cAMPS;  // modifiers: Rp_cAMPS
  v35_v_34: RIIp_Rp_cAMPS_C_2 => RIIp_C_2; cyt*KD_cAMP*RIIp_Rp_cAMPS_C_2*kf_cAMP*xi_b_Rp_cAMPS*xi_KD_Rp_cAMPS;
  v36_v_35: RIIp_C_2 => RIIp_Sp8_Br_cAMPS_C_2; cyt*RIIp_C_2*Sp8_Br_cAMPS*kf_cAMP*xi_b_Sp8_Br_cAMPS;  // modifiers: Sp8_Br_cAMPS
  v37_v_36: RIIp_Sp8_Br_cAMPS_C_2 => RIIp_C_2; cyt*KD_cAMP*RIIp_Sp8_Br_cAMPS_C_2*kf_cAMP*xi_b_Sp8_Br_cAMPS*xi_KD_Sp8_Br_cAMPS;
  v38_v_37: RIIp_Sp8_Br_cAMPS_C_2 => Csub + RIIp_Sp8_Br_cAMPS_2; cyt*RIIp_Sp8_Br_cAMPS_C_2*kf_RIIp_cAMP_C_2__RIIp_2;
  v27_v_26: RIIp_cAMP_C_2 => Csub + RIIp_cAMP_2; cyt*RIIp_cAMP_C_2*kf_RIIp_cAMP_C_2__RIIp_2;
  v19_v_18: RIIp_C_2 => Csub + RIIp_2; cyt*RIIp_C_2*kf_RII_C_2__RII_2*xi_kf_RII_C_2__RII_2;
  v20_v_19: Csub + RIIp_2 => RIIp_C_2; cyt*Csub*RIIp_2*kf_RII_2__RII_C_2*xi_kf_RII_2__RII_C_2;
  v21_v_20: RIIp_2 => ; cyt*RIIp_2*kf_RIIp_2__RII_2;
  v39_v_38: RIIp_Sp8_Br_cAMPS_2 => RIIp_2; cyt*KD_cAMP*RIIp_Sp8_Br_cAMPS_2*kf_cAMP*xi_b_Sp8_Br_cAMPS*xi_KD_Sp8_Br_cAMPS;
  v24_v_23: RIIp_C_2 => RIIp_cAMP_C_2; cyt*RIIp_C_2*cAMP*kf_cAMP;  // modifiers: cAMP
  v25_v_24: RIIp_cAMP_C_2 => RIIp_C_2; cyt*KD_cAMP*RIIp_cAMP_C_2*kf_cAMP;
  v26_v_25: RIIp_cAMP_C_2 => RIIp_C_2; cyt*(KD_IBMX*RIIp_cAMP_C_2*kdeg_cAMP/(IBMX + KD_IBMX));  // modifiers: IBMX
  v29_v_28: RIIp_cAMP_2 => RIIp_2; cyt*(KD_IBMX*RIIp_cAMP_2*kdeg_cAMP/(IBMX + KD_IBMX));  // modifiers: IBMX
  v28_v_27: RIIp_cAMP_2 => RIIp_2; cyt*KD_cAMP*RIIp_cAMP_2*kf_cAMP;
  v16_v_15: cAMP => ; cyt*(KD_IBMX*cAMP*kdeg_cAMP_free/(IBMX + KD_IBMX));  // modifiers: IBMX
  v14_v_13: => cAMP; cyt*ks_AC_cAMP*AC;  // modifiers: AC
  v15_v_14: => cAMP; cyt*ks_AC_cAMP*xi_AC_cAMP_Fsk*(1 - (AC + AC_alphaI_GTP + AC_alphaS_GTP));  // modifiers: AC, AC_alphaI_GTP, AC_alphaS_GTP
  cAMP_prod_AC_alphaS_GTP: => cAMP; cyt*ks_AC_cAMP*xi_AC_cAMP_alphaS_GTP*AC_alphaS_GTP;  // modifiers: AC_alphaS_GTP
  AC_alphaI_GTP____AC___alphaI_GTP: AC_alphaI_GTP => AC + alphaI_GTP; cyt*kf_AC_alphaI_GTP*AC_alphaI_GTP; AC_alphaI_GTP____AC___alphaI_GTP is "AC_alphaI_GTP __ AC + alphaI_GTP";
  AC___alphaI_GTP____AC_alphaI_GTP: AC + alphaI_GTP => AC_alphaI_GTP; cyt*kf_AC_alphaI_GTP*KD_AC_alphaI_GTP*AC*alphaI_GTP; AC___alphaI_GTP____AC_alphaI_GTP is "AC + alphaI_GTP __ AC_alphaI_GTP";
  AC_alphaS_GTP_____AC___alphaS_GTP: AC_alphaS_GTP => AC + alphaS_GTP; cyt*kf_AC_alphaS_GTP*AC_alphaS_GTP; AC_alphaS_GTP_____AC___alphaS_GTP is "AC_alphaS_GTP __ AC + alphaS_GTP";
  AC___alphaS_GTP_____AC_alphaS_GTP: AC + alphaS_GTP => AC_alphaS_GTP; cyt*kf_AC_alphaS_GTP*KD_AC_alphaS_GTP*AC*alphaS_GTP; AC___alphaS_GTP_____AC_alphaS_GTP is "AC + alphaS_GTP __ AC_alphaS_GTP";
  MOR____MOR_DAMGO: MOR => MOR_DAMGO; cyt*MOR*DAMGO*kf_DAMGO; MOR____MOR_DAMGO is "MOR___MOR_DAMGO";
  MOR_DAMGO____MOR: MOR_DAMGO => MOR; cyt*MOR_DAMGO*KD_DAMGO*kf_DAMGO; MOR_DAMGO____MOR is "MOR_DAMGO___MOR";
  MOR____MOR_Fentanyl: MOR => MOR_Fentanyl; cyt*MOR*Fentanyl*kf_Fentanyl;
  MOR_Fentanyl____MOR: MOR_Fentanyl => MOR; cyt*MOR_Fentanyl*kf_Fentanyl*KD_Fentanyl;
  MOR_DAMGO___: MOR_DAMGO => ; cyt*kdeg_DAMGO*MOR_DAMGO;
  MOR___deg: MOR => ; cyt*NO_DAMGO_Fentanyl*MOR*MOR;
  MOR___syn: => MOR; cyt*NO_DAMGO_Fentanyl*MOR;
  MOR_Fentanyl__: MOR_Fentanyl => ; cyt*kdeg_Fentanyl*MOR_Fentanyl;
  fiveHT4___fiveHT4_5HT: fiveHT4 => fiveHT4_5HT; cyt*fiveHT4*fiveHT*kf_5HT;
  fiveHT4_5HT___fiveHT4: fiveHT4_5HT => fiveHT4; cyt*fiveHT4_5HT*KD_5HT*kf_5HT;
  fiveHT4_5HT___: fiveHT4_5HT => ; cyt*kdeg_5HT*fiveHT4_5HT;
  fiveHT4___deg: fiveHT4 => ; cyt*NO_fiveHT*fiveHT4*fiveHT4;
  fiveHT4___syn: => fiveHT4; cyt*NO_fiveHT*fiveHT4;
  alphaS_GTP____alphaS_GDP: alphaS_GTP => ; cyt*kf_alphaS_GTP__alphaS_GDP*alphaS_GTP; alphaS_GTP____alphaS_GDP is "alphaS_GTP -> alphaS_GDP";
  alphaI_GTP____alphaI_GDP: alphaI_GTP => ; cyt*kf_alphaI_GTP__alphaI_GDP*alphaI_GTP; alphaI_GTP____alphaI_GDP is "alphaI_GTP -> alphaI_GDP";
  alphaI_GDP___betaI_gammaI____alphaI_betaI_gammaI: => alphaI_betaI_gammaI; cyt*kf_alphaI_GDP__betaI_gammaI____alphaI_betaI_gammaI*(1 - (alphaI_betaI_gammaI + alphaI_GTP + AC_alphaI_GTP))*(1 - alphaI_betaI_gammaI); alphaI_GDP___betaI_gammaI____alphaI_betaI_gammaI is "alphaI_GDP + betaI_gammaI -> alphaI_betaI_gammaI";  // modifiers: alphaI_GTP, AC_alphaI_GTP
  alphaS_GDP___betaS_gammaS____alphaS_betaS_gammaS: => alphaS_betaS_gammaS; cyt*kf_alphaS_GDP__betaS_gammaS____alphaS_betaS_gammaS*(1 - (alphaS_betaS_gammaS + alphaS_GTP + AC_alphaS_GTP))*(1 - alphaS_betaS_gammaS); alphaS_GDP___betaS_gammaS____alphaS_betaS_gammaS is "alphaS_GDP + betaS_gammaS -> alphaS_betaS_gammaS";  // modifiers: alphaS_GTP, AC_alphaS_GTP
  alphaS_betaS_gammaS_____alphaS_GTP___betaS_gammaS: alphaS_betaS_gammaS => alphaS_GTP; cyt*kf_alphaS_betaS_gammaS*alphaS_betaS_gammaS; alphaS_betaS_gammaS_____alphaS_GTP___betaS_gammaS is "alphaS_betaS_gammaS -> alphaS_GTP + betaS_gammaS";
  alphaS_betaS_gammaS_____alphaS_GTP___betaS_gammaS__2: alphaS_betaS_gammaS => alphaS_GTP; cyt*kf_alphaS_betaS_gammaS*xi_alphaS_betaS_gammaS__fiveHT4_5HT*fiveHT4_5HT*alphaS_betaS_gammaS; alphaS_betaS_gammaS_____alphaS_GTP___betaS_gammaS__2 is "alphaS_betaS_gammaS -> alphaS_GTP + betaS_gammaS, 2";  // modifiers: fiveHT4_5HT
  alphaI_betaI_gammaI____alphaI_GTP___betaI_gammaI: alphaI_betaI_gammaI => alphaI_GTP; cyt*kf_alphaI_betaI_gammaI*alphaI_betaI_gammaI; alphaI_betaI_gammaI____alphaI_GTP___betaI_gammaI is "alphaI_betaI_gammaI -> alphaI_GTP + betaI_gammaI";
  alphaI_betaI_gammaI____alphaI_GTP___betaI_gammaI__2: alphaI_betaI_gammaI => alphaI_GTP; cyt*kf_alphaI_betaI_gammaI*xi_alphaI_betaI_gammaI__MOR_DAMGO*MOR_DAMGO*alphaI_betaI_gammaI; alphaI_betaI_gammaI____alphaI_GTP___betaI_gammaI__2 is "alphaI_betaI_gammaI -> alphaI_GTP + betaI_gammaI, 2";  // modifiers: MOR_DAMGO
  alphaI_betaI_gammaI____alphaI_GTP___betaI_gammaI__4: alphaI_betaI_gammaI => alphaI_GTP; cyt*kf_alphaI_betaI_gammaI*xi_alphaI_betaI_gammaI__MOR_DAMGO*xi_alphaI_betaI_gammaI__RIIp_cAMP*MOR_DAMGO*(RIIp_cAMP_2 + RIIp_Sp8_Br_cAMPS_2)*alphaI_betaI_gammaI; alphaI_betaI_gammaI____alphaI_GTP___betaI_gammaI__4 is "alphaI_betaI_gammaI -> alphaI_GTP + betaI_gammaI, 4";  // modifiers: MOR_DAMGO, RIIp_cAMP_2, RIIp_Sp8_Br_cAMPS_2
  alphaI_betaI_gammaI____alphaI_GTP___betaI_gammaI__3: alphaI_betaI_gammaI => alphaI_GTP; cyt*kf_alphaI_betaI_gammaI*xi_alphaI_betaI_gammaI__MOR_Fentanyl*MOR_Fentanyl*alphaI_betaI_gammaI; alphaI_betaI_gammaI____alphaI_GTP___betaI_gammaI__3 is "alphaI_betaI_gammaI -> alphaI_GTP + betaI_gammaI, 3";  // modifiers: MOR_Fentanyl
  alphaI_betaI_gammaI____alphaI_GTP___betaI_gammaI__5: alphaI_betaI_gammaI => alphaI_GTP; cyt*kf_alphaI_betaI_gammaI*xi_alphaI_betaI_gammaI__MOR_Fentanyl*xi_alphaI_betaI_gammaI__RIIp_cAMP*MOR_Fentanyl*(RIIp_cAMP_2 + RIIp_Sp8_Br_cAMPS_2)*alphaI_betaI_gammaI; alphaI_betaI_gammaI____alphaI_GTP___betaI_gammaI__5 is "alphaI_betaI_gammaI -> alphaI_GTP + betaI_gammaI, 5";  // modifiers: MOR_Fentanyl, RIIp_cAMP_2, RIIp_Sp8_Br_cAMPS_2
  v18_v_17: Csub => RII_C_2; cyt*Csub*(1 - (RIIp_2 + RII_C_2 + RIIp_C_2 + RIIp_cAMP_C_2 + RIIp_cAMP_2 + RIIp_Rp8_Br_cAMPS_C_2 + RIIp_Rp8_pCPT_cAMPS_C_2 + RIIp_Rp_cAMPS_C_2 + RIIp_Sp8_Br_cAMPS_C_2 + RIIp_Sp8_Br_cAMPS_2))*kf_RII_2__RII_C_2;  // modifiers: RIIp_2, RIIp_C_2, RIIp_cAMP_C_2, RIIp_cAMP_2, RIIp_Rp8_Br_cAMPS_C_2, RIIp_Rp8_pCPT_cAMPS_C_2, RIIp_Rp_cAMPS_C_2, RIIp_Sp8_Br_cAMPS_C_2, RIIp_Sp8_Br_cAMPS_2
  v17_v_16: RII_C_2 => Csub; cyt*RII_C_2*kf_RII_C_2__RII_2;
  v22_v_21: RII_C_2 => RIIp_C_2; cyt*RII_C_2*kf_RII_C_2__RIIp_C_2;
  v23_v_22: RIIp_C_2 => RII_C_2; cyt*RIIp_C_2*kf_RIIp_C_2__RII_C_2;

  // Unit definitions:
  unit time = 60 second;
  unit substance = mole;
  unit volume = litre;
  unit area = metre^2;
  unit length = metre;
end
